*Heading
** Job name: Job-verifystapmat-no2 Model name: Model-verifystapmat
** Generated by: Abaqus/CAE 6.14-1
*Preprint, echo=NO, model=NO, history=NO, contact=NO
**
** PARTS
**
*Part, name=Part-2
*End Part
**
**
** ASSEMBLY
**
*Assembly, name=Assembly
**
*Instance, name=Part-2-1, part=Part-2
*Node
      1,          45.,          15.
      2,          45.,          25.
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*Element, type=CAX8R
 1,  49,  36,   1,   9,  52,  53,  54,  55
 2,  37,  11,  12,  40,  56,  57,  58,  59
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*Nset, nset=Set-1, generate
   1,  133,    1
*Elset, elset=Set-1, generate
  1,  32,   1
** Section: Section-1
*Solid Section, elset=Set-1, material=Material-1
,
*End Instance
**
*Nset, nset=Set-6, instance=Part-2-1
   4,   5,  23,  24,  25,  26,  71,  73, 101, 105, 108
*Elset, elset=Set-6, instance=Part-2-1
  5,  6, 16, 17, 18
*Nset, nset=Set-8, instance=Part-2-1
   4,   5,  23,  24,  25,  26,  71,  73, 101, 105, 108
*Elset, elset=Set-8, instance=Part-2-1
  5,  6, 16, 17, 18
*Elset, elset=_Surf-9_S1, internal, instance=Part-2-1
 10, 32
*Elset, elset=_Surf-9_S3, internal, instance=Part-2-1
 11, 13, 22, 23
*Surface, type=ELEMENT, name=Surf-9
_Surf-9_S1, S1
_Surf-9_S3, S3
*End Assembly
*Amplitude, name=Amp-2, definition=PERIODIC
1,              1.,              0.,              1.
             0.,              0.
*Amplitude, name=Amp-3, time=TOTAL TIME, definition=PERIODIC
1,         5.20346,              1.,              0.
             0.,              1.
*Amplitude, name=Amp-4, definition=PERIODIC
1,              1.,              0.,              0.
             0.,              1.
*Amplitude, name=Amp-constantforce, definition=PERIODIC
1,              0.,              0.,              1.
             0.,              0.
*Amplitude, name=Amp-sin(t), time=TOTAL TIME, definition=PERIODIC
1,              1.,              0.,              0.
             0.,              1.
*Amplitude, name=Amp-w2, definition=PERIODIC
1,              6.,              0.,              0.
             0.,              1.
*Amplitude, name=Amp-w3, definition=PERIODIC
1,           7.819,              0.,              0.
             0.,              1.
**
** MATERIALS
**
*Material, name=Material-1
*Density
 7.9,
*Elastic
100000., 0.2
**
** BOUNDARY CONDITIONS
**
** Name: BC-1 Type: Symmetry/Antisymmetry/Encastre
*Boundary
Set-8, ENCASTRE
** ----------------------------------------------------------------
**
** STEP: Step-1
**
*Step, name=Step-1, nlgeom=NO
*Static
1., 1., 1e-05, 1.
**
** LOADS
**
** Name: Load-2   Type: Surface traction
*Dsload
Surf-9, TRSHR, 1., 0., 1., 0.
**
** OUTPUT REQUESTS
**
*Restart, write, frequency=0
**
** FIELD OUTPUT: F-Output-1
**
*Output, field, variable=PRESELECT
**
** HISTORY OUTPUT: H-Output-1
**
*Output, history, variable=PRESELECT
*End Step
